OpenVSP model (file version 5), 8 components.
Geometry view with OpenVSP parameter names; values to 6 digits, angles in degrees, lengths in the model's unit.
Overall bounding box: X_Min=-0.429932 X_Len=60.9309 Y_Min=-29 Y_Len=58 Z_Min=-12.2107 Z_Len=25.9607

Fuselage "FuselageGeom"
  location (X Y Z) 0 0 -1.25, rotation 0 0 0
  bounding box size 60 4.91705 5.78204
  Design: Length=60
  cross sections:
    n  XLocPercent  YLocPercent  ZLocPercent  shape
    0  0            0            0.025        rounded rectangle RoundRectXSec_Radius=0.2 RoundedRect_Height=2.5 RoundedRect_Width=2.5
    1  0.266667     0            0            rounded rectangle RoundRectXSec_Radius=0.2 RoundedRect_Height=5.5 RoundedRect_Width=4.5
    2  0.466667     0            0            as above
    3  0.6          0            0.00833333   rounded rectangle RoundRectXSec_Radius=0.2 RoundedRect_Height=4.5 RoundedRect_Width=4.5
    4  0.75         0            0.025        rounded rectangle RoundRectXSec_Radius=0.2 RoundedRect_Height=3 RoundedRect_Width=4.5
    5  1            0            0.05         point

Stack "Landing Gear", child of "FuselageGeom"
  location (X Y Z) 16 -2.5 -2, rotation 45 0 -90
  symmetric about XZ
  bounding box size 1.85355 22.1473 8.66206
  cross sections:
    n  XDelta  YDelta  ZDelta  shape
    0  0       0       0       rounded rectangle RoundRectXSec_Radius=0 RoundedRect_Height=0.25 RoundedRect_Width=1.5
    1  1       0       0       as above
    2  11      0       0       as above

Wing "WingGeom"
  location (X Y Z) 16 0 -3.75, rotation 0 0 0
  symmetric about XZ
  bounding box size 12.0038 58 1.53429
  totals: TotalSpan=58 TotalProjectedSpan=58 TotalChord=12 TotalArea=696 TotalAR=4.83333
  root: chord 12, twist 0, NACA 4-series Camber=0.04 CamberLoc=0.4 ThickChord=0.12
  sections:
    n  Span  Root_Chord  Tip_Chord  Area  Sweep  Sweep_Location  Dihedral  Twist  Twist_Location  tip airfoil
    1  29    12          12         348   0      0               0         0      0.25            as above

Propeller "PropGeom"
  location (X Y Z) 0 0 0, rotation 0 0 0
  bounding box size 0.844848 17.0306 1.65038
  Design: Diameter=17 NumBlade=2 Beta34=20 UseBeta34Flag=1 Feather=0 Rotate=0 Precone=0 ReverseFlag=0 FoldAngle=0 PropMode=0 AF=151.538 CLi=0.538798 Chord=0.177656 Solidity=0.113099 ConstructXoC=0.5 FeatherAxisXoC=0.5 FeatherOffsetXoC=0
  cross sections:
    n  RadiusFrac  shape
    0  0.2         ellipse Ellipse_Height=0.34 Ellipse_Width=0.68
    1  0.4         NACA 16-series Chord=1.41313 IdealCl=0.7 ThickChord=0.144074
    2  1           NACA 16-series Chord=1.105 IdealCl=0.2 ThickChord=0.03
  Chord along r/R (cubic Bezier): 0.2: 0.08, 0.333333: 0.15, 0.466667: 0.2, 0.6: 0.2, 0.716667: 0.2, 0.833333: 0.2, 0.95: 0.2, 0.966667: 0.2, 0.983333: 0.2, 1: 0.13
  Twist along r/R (PCHIP): 0.2: 46.75, 0.75: 20, 1: 13
  Thick along r/R (cubic Bezier): 0.2: 0.5, 0.233333: 0.3, 0.266667: 0.225, 0.3: 0.2, 0.4: 0.125, 0.5: 0.115, 0.6: 0.1, 0.733333: 0.075, 0.866667: 0.055, 1: 0.03
  CLI along r/R (cubic Bezier): 0.2: 0, 0.266667: 0.7, 0.333333: 0.7, 0.4: 0.7, 0.466667: 0.7, 0.533333: 0.7, 0.6: 0.7, 0.733333: 0.7, 0.866667: 0.7, 1: 0.2

Wing "H Tail"
  location (X Y Z) 53 0 1.75, rotation 0 0 0
  symmetric about XZ
  bounding box size 7.50095 22 0.750435
  totals: TotalSpan=22 TotalProjectedSpan=22 TotalChord=6.75 TotalArea=148.5 TotalAR=3.25926
  root: chord 7.5, twist 0, NACA 4-series Camber=0 CamberLoc=0.2 ThickChord=0.1
  sections:
    n  Span  Root_Chord  Tip_Chord  Area   Sweep  Sweep_Location  Dihedral  Twist  Twist_Location  tip airfoil
    1  11    7.5         6          74.25  7.77   0               0         0      0.25            as above

Wing "V Tail"
  location (X Y Z) 50 0 1.75, rotation 90 0 0
  bounding box size 10 1.00058 12
  totals: TotalSpan=12 TotalProjectedSpan=12 TotalChord=8 TotalArea=96 TotalAR=1.5
  root: chord 10, twist 0, NACA 4-series Camber=0 CamberLoc=0.2 ThickChord=0.1
  sections:
    n  Span  Root_Chord  Tip_Chord  Area  Sweep  Sweep_Location  Dihedral  Twist  Twist_Location  tip airfoil
    1  12    10          6          96    18.4   0               0         0      0.25            as above

Stack "Wheels"
  location (X Y Z) 16 -11.7049 -10.6107, rotation 0 0 90
  symmetric about XZ
  bounding box size 3.2 23.4098 3.2
  cross sections:
    n  XDelta  YDelta  ZDelta  shape
    0  0       0       0       circle Circle_Diameter=3.2
    1  0.5     0       0       as above

Mesh "MeshGeom"
  location (X Y Z) 0 0 0, rotation 0 0 0
  triangle mesh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
